<?xml version="1.0" encoding="UTF-8"?>
<channelml xmlns="http://morphml.org/channelml/schema" xmlns:xsi="http://www.w3.org/2001/XMLSchema-instance" xmlns:meta="http://morphml.org/metadata/schema" xsi:schemaLocation="http://morphml.org/channelml/schema http://www.neuroml.org/NeuroMLValidator/NeuroMLFiles/Schemata/v1.8.1/Level2/ChannelML_v1.8.1.xsd" units="Physiological Units">

    <meta:notes>ChannelML file containing a single Channel description</meta:notes>

    <channel_type name="Nav_iAMC" density="yes">

        <status value="stable">
            <meta:comment>Sodium current from an intrinsically oscillating AOB mitral cell from parameters recorded in the lab of M. Spehr RWTH Aachen</meta:comment>
            <meta:contributor>
                <meta:name>Simon O'Connor</meta:name>
            </meta:contributor>
        </status>

        <meta:notes>Na Channel</meta:notes>

        <meta:authorList>
            <meta:modelTranslator>
                <meta:name>Simon O'Connor</meta:name>
                <meta:institution>UH</meta:institution>
                <meta:email>simon.oconnor - at - btinternet.com</meta:email>
            </meta:modelTranslator>
        </meta:authorList>

        <current_voltage_relation cond_law="ohmic" ion="na" default_gmax="120" default_erev="50" charge="1">

                <!--q10_settings q10_factor="2" experimental_temp="24"/-->

	  <gate id="m" type="gateHHtauInf" instances="?">
	      <timeCourse type="??"/>
	          <!--1/((exp((V+A)/B))+(exp((-V-C)/B))) A=?? B=?? C=?? -->

	      <steadyState type="HHSigmoidVariable" rate="1" scale="0.0198V" midpoint="-0.036V"/>
	  </gate>

	  <gate id="h" type="gateHHtauInf" instances="?">
	      <timeCourse type="??"/>
	          <!--1/((exp((V+A)/B))+(exp((-V-C)/B))) A=-42.57 B=70.82 C=107.53-->

	      <steadyState type="HHSigmoidVariable" rate="1" scale="-0.0084V" midpoint="-0.0688V"/>
	  </gate>

        </current_voltage_relation>

            <!--impl_prefs>
            <table_settings max_v="100" min_v="-100" table_divisions="2000"/>
        </impl_prefs-->

    </channel_type>
</channelml>
